// COMSOL Multiphysics 5.2.1.152 model "Q2.mph"
// Outline of the model tree

Parameters
  W = 0.1 [mm]
  G = 2*W

Probes
  pdom1: DomainPoint "Domain Point Probe 1" | coords = {W/2, 0}
    ppb1: PointExpr "Point Probe Expression 1" | expr = p
  pdom2: DomainPoint "Domain Point Probe 2" | coords = {35*W+(W/2), 0}
    ppb2: PointExpr "Point Probe Expression 2" | expr = p

Geometry
  geom1 "Geometry 1" (2D, length unit m)
    r1: Rectangle | size = {W, 16*W-G}
    r2: Rectangle | pos = {W, 8*W-G}; size = {G, G}
    r3: Rectangle | pos = {W+G, 8*W-G}; size = {G, 8*W}
    r4: Rectangle | pos = {W+G+G, 16*W-2*G}; size = {G, G}
    r5: Rectangle | pos = {W+3*G, 8*W-G}; size = {G, 8*W}
    uni1: Union | input = r2, r3, r4, r5; intbnd = off; edge = all
    arr1: Array | input = uni1; size = {4, 1}; fullsize = {4, 1}; displ = {4*G, 0}
    r6: Rectangle | pos = {16*G+W, 8*W-G}; size = {G, G}
    r7: Rectangle | pos = {35*W, 0}; size = {W, 16*W-G}
    uni2: Union | input = arr1, r1, r6, r7; intbnd = off; edge = all
    fin: Finalize "Form Union"

Materials
  mat1: Common "Water, liquid" on all domains
    def "Basic"
      dynamicviscosity = eta(T[1/K])[Pa*s]
      ratioofspecificheat = 1.0
      electricconductivity = 5.5e-6[S/m]
      heatcapacity = Cp(T[1/K])[J/(kg*K)]
      density = rho(T[1/K])[kg/m^3]
      thermalconductivity = k(T[1/K])[W/(m*K)]
      soundspeed = cs(T[1/K])[m/s]
      eta: Piecewise
        arg = T
        extrap = constant
        pieces = 
          {273.15, 413.15, 1.3799566804-0.021224019151*T^1+1.3604562827E-4*T^2-4.6454090319E-7*T^3+8.9042735735E-10*T^4-9.0790692686E-13*T^5+3.8457331488E-16*T^6}
          {413.15, 553.75, 0.00401235783-2.10746715E-5*T^1+3.85772275E-8*T^2-2.39730284E-11*T^3}
      Cp: Piecewise | arg = T; extrap = constant; pieces = {273.15, 553.75, 12010.1471-80.4072879*T^1+0.309866854*T^2-5.38186884E-4*T^3+3.62536437E-7*T^4}
      rho: Piecewise | arg = T; extrap = constant; pieces = {273.15, 553.75, 838.466135+1.40050603*T^1-0.0030112376*T^2+3.71822313E-7*T^3}
      k: Piecewise | arg = T; extrap = constant; pieces = {273.15, 553.75, -0.869083936+0.00894880345*T^1-1.58366345E-5*T^2+7.97543259E-9*T^3}
      cs: Interpolation | source = table; table = {{273, 1403}, {278, 1427}, {283, 1447}, {293, 1481}, {303, 1507}, {313, 1526}, {323, 1541}, {333, 1552}, {343, 1555}, {353, 1555}, {363, 1550}, {373, 1543}}; interp = piecewisecubic; extrap = const

Physics
  tds: DilutedSpecies "Transport of Diluted Species" on all domains
    dependent variable c
    cdm1: ConvectionDiffusionMigration "Transport Properties 1" (default) | D_c = 5*(10^-10)[m^2/s]
    nflx1: NoFlux (default)
    init1: init "Initial Values 1" (default)
    conc1: Concentration on boundaries 3 | species = 1
    conc2: Concentration on boundaries 2 | species = 1; c0 = 1
    out1: Outflow on boundaries 57, 59
  spf: LaminarFlow on all domains
    dependent variable u = {u, v, w}
    fp1: FluidProperties (default)
    init1: init "Initial Values 1" (default)
    wall1: Wall (default)
    inl1: InletBoundary "Inlet 1" on boundaries 2, 3 | U0in = 1[mm/s]
    out1: OutletBoundary "Outlet 1" on boundaries 57, 59

Multiphysics
  fc1: FlowCoupling | Source_physics = spf; Destination_physics = tds

Mesh
  mesh1 "Mesh 1" (physics-controlled)
    size: MeshSizeDefault | table = cfd; hauto = 6

Studies
  std1 "Study 1"
    stat: Stationary

Solver configurations
  sol1 "Solution 1" (study std1)
    v1: Variables "Dependent Variables 1"
    s1: Stationary "Stationary Solver 1"
      fc1: FullyCoupled | linsolver = d1; dtech = auto; initstep = 0.01; minstep = 1.0E-6; maxiter = 100
      d1: Direct | linsolver = pardiso

Datasets
  dset1: Solution | solution = sol1
  dset2: Solution "Probe Solution 2" | solution = sol1
  cpt1: CutPoint2D "Domain Point Probe 1" | data = dset2; pointx = 0.5*W
  cpt2: CutPoint2D "Domain Point Probe 2" | data = dset2; pointx = 35.5*W

Derived values
  av1: AvLine "Line Average 1" on boundaries 59 | data = dset1; table = tbl1; expr = 2*c
  pev1: EvalPoint "Point Probe Expression 1" | data = cpt1; table = new; expr = p
  pev2: EvalPoint "Point Probe Expression 2" | data = cpt2; table = new; expr = p
  min1: MinLine "Line Minimum 1" on boundaries 3 | data = dset1; table = tbl2; expr = p

Tables
  tbl1: Table
    // Line Average 1 (2*c)
    2*c (mol/m^3)
    0.922144
  tbl2: Table
    // Line Minimum 1 ()
    Pressure (Pa)
    3.67497

Plots
  pg1: PlotGroup2D "Concentration (tds)" | data = dset1
    surf1: Surface | expr = c
  pg2: PlotGroup2D "Velocity (spf)" | data = dset1
    surf1: Surface | expr = spf.U; differential = on
    arws1: ArrowSurface | expr = {u, v}; xnumber = 50; ynumber = 50
  pg3: PlotGroup2D "Pressure (spf)" | data = dset1
    con1: Contour | expr = p; differential = on